folder simulations: version=37; creator=Apsim 7.9-r4044
  memo
    Issues to resolve
    - Using american hybrid to test - change to NZ hybrid later
    - Why is leaching so different between models?
    - Not sensitive to Ks in SWIM - check
  simulation SWIM3_soil1
    metfile met
      filename=C:\GitHubRepos\2016_SAE_Tillage_ClimateChange\weather\HawkesBay_VCSN_agent_28460_rean1970.met
    clock
      start_date = 01/09/1982  # Enter the start date of the simulation
      end_date = 31/12/1985  # Enter the end date of the simulation
    summaryfile
    area ConvTill
      surfaceom SurfaceOrganicMatter
        PoolName = wheat  # Organic Matter pool name
        type = wheat  # Organic Matter type
        mass = 1000  # Initial surface residue (kg/ha)
        cnr = 80  # C:N ratio of initial residue
        standing_fraction = 0  # Fraction of residue standing
      fertiliser
      folder Manager folder
        operations SimpleSowRule
          10-oct  maize sow plants =10, sowing_depth = 50,  cultivar = Pioneer_35P12_104' ,  row_spacing = 750,  crop_class = plant
        manager Harvesting rule
          # Harvesting criteria
          crop = maize  # Enter name of crop to harvest when ripe
          on end_of_day:
```
           if [crop].StageName = 'harvest_ripe' or [crop].plant_status = 'dead' then
              [crop]  harvest
              [crop]  end_crop
           endif
```
        operations FertiliserSimpleRules
          10-oct  fertiliser apply amount= 40 (kg/ha), type= urea_N (), depth= 10 (mm)
          10-dec  fertiliser apply amount= 150 (kg/ha), type= urea_N (), depth= 10 (mm)
        manager Tillage
          # When should tillage be performed
          modulename = maize  # The module the event come from
          eventname = sowing  # On which event should tillage be done
          # Tillage details
          surfaceommodule = SurfaceOrganicMatter  # Module used to apply the tillage
          tillage_type = disc
          tillage_depth = 20  # User_defined depth of seedbed preparation (mm)
          tillage_f_incorp = 0.5  # User_defined fraction of surface residues to incorporate (0-1)
          on sowing:
```
 '[surfaceommodule]' tillage type = [tillage_type], f_incorp = [tillage_f_incorp] (), tillage_depth = [tillage_depth]
```
        irrigation (disabled)
          automatic_irrigation = off
          asw_depth = 600  # Depth to which ASW is calculated. (mm)
          crit_fr_asw = 0.7  # Fraction of ASW below which irrigation is applied (0-1.0)
          irrigation_efficiency = 1  # Efficiency of the irrigation. (0-1.0)
          irrigation_allocation = off  # Allocation limits
          allocation = 0  # Allocation in mm
          default_no3_conc = 0.0  # Nitrate concentration (ppm N)
          default_nh4_conc = 0.0  # Ammonium concentration (ppm N)
          default_cl_conc = 0.0  # Chloride concentration (ppm Cl)
      outputfile: filename=SWIM3_soil1 ConvTill.out; title=SWIM3_soil1 ConvTill
        variables
          variables: dd/mm/yyyy as Date, biomass, yield, grain_protein, grain_size, esw, sw, surfaceom_c, leachSum, no3(), drainSum, HarvIndex as HI, NfertTot, fertiliser, ReadyToSow, n_stress_expan, n_stress_grain, n_stress_pheno, n_stress_photo, n_stress_tiller, sw_stress_expan, sw_stress_pheno, sw_stress_photo, sw_stress_tiller, leaf_no_final
        events Reporting Frequency: event=harvesting
      maize
      manager ExtraVariables
        on init:
```
leachSum = 0 kg N-no3/fa
drainSum = 0 mm
HarvIndex = 0
tempSum = 0
tempAv = 0
rainSum = 0
dayCount = 0
eoSum=0 ! pot ET
esSum=0 ! soil evap
runoffSum = 0
```
        on start_of_day:
```
dayCount = dayCount + 1
leachSum = leachSum + flow_no3(4)
drainSum = drainSum + drain
tempSum = (tempSum + (mint + maxt)*0.5)
tempAv = tempSum/dayCount
rainSum = rain + rainSum 
eoSum= eo + eoSum 
esSum= es + esSum
runoffSum = runoffSum + runoff

if (biomass>0) then
HarvIndex = yield/biomass
else
HarvIndex = 0 
endif
```
        on sowing:
```
leachSum = 0
drainSum = 0
HarvIndex = 0
dayCount = 0
tempAv = 0
rainSum = 0
tempSum = 0
eoSum= 0 
esSum= 0
runoffSum = 0
```
      outputfile dailyTest: filename=SWIM3_soil1 ConvTill dailyTest.out; title=SWIM3_soil1 ConvTill dailyTest
        variables
          variables: dd/mm/yyyy as Date, ReadyToSow, SowByMoisture, SowByTemp, SWD_top, TempAvRun, n_stress_expan, n_stress_grain, n_stress_pheno, n_stress_photo, n_stress_tiller, sw_stress_expan, sw_stress_pheno, sw_stress_photo, sw_stress_tiller, fertiliser, irrigation, rain, es as evaporation, drain, sw_dep(), dnit() as denitrification, surfaceom_n, fom_n(), biom_n(), hum_n(), urea(), nh4(), no3(), sat_dep(), dul_dep(), ll15_dep()
        events Reporting Frequency: event=daily
      Soil Hastings_29a1: SoilType=m; Latitude=-41; Longitude=174; YearOfSampling=0
        DataSource=Profile descriptions provided by Smap based on the work done by Trevor Webb.
        LayerStructure: Thickness=[100, 500, 350, 350, 350, 350]
        Water
          Thickness  BD       AirDry  LL15   DUL    SAT      KS
          100        0.94116  0.0825  0.165  0.484  0.58404  1440
          500        1.18151  0.1368  0.171  0.427  0.49569  960
          350        1.6492   0.049   0.049  0.174  0.38223  1920
          350        1.6492   0.049   0.049  0.174  0.38223  1920
          350        1.6492   0.049   0.049  0.174  0.38223  1920
          350        1.6492   0.049   0.049  0.174  0.38223  1920
          SoilCrop Ryegrass_Clover: LL=[0.165, 0.171, 0.049, 0.049, 0.049, 0.049]; KL=[0.15, 0.111123, 0.0101228, 0, 0, 0]; XF=[1, 1, 1, 1, 1, 1]
          SoilCrop maize: LL=[0.165, 0.171, 0.049, 0.049, 0.049, 0.049]; KL=[0.15, 0.111123, 0.0101228, 0, 0, 0]; XF=[1, 1, 1, 1, 1, 1]
          SoilCrop wheat: LL=[0.165, 0.171, 0.049, 0.049, 0.049, 0.049]; KL=[0.15, 0.111123, 0.0101228, 0, 0, 0]; XF=[1, 1, 1, 1, 1, 1]
        SoilOrganicMatter: RootCN=40; RootWt=1000; SoilCN=11; EnrACoeff=7.4; EnrBCoeff=0.2; OCUnits=Total
          Thickness  OC        FBiom      FInert
          100        2.6       0.0396327  0.268398
          500        0.684552  0.0148983  0.702553
          350        0.216171  0.0103825  0.916884
          350        0.200983  0.0100468  0.970915
          350        0.20006   0.0100057  0.989822
          350        0.200004  0.0100007  0.996438
        Analysis: PHUnits=Water; BoronUnits=HotWater
          Thickness  Rocks  PH  CEC      ParticleSizeSand  ParticleSizeSilt  ParticleSizeClay
          100        0      7   16.014   8                 72                20
          500        0      7   11.7042  8                 72                20
          1400       0      7   1.72055  90                7                 3
        Sample Initial nitrogen: NO3Units=kgha; NH4Units=kgha; SWUnits=Volumetric; OCUnits=Total; PHUnits=Water
          Thickness  NO3       NH4
          100        13.3      0.1
          500        53.4333   0.1
          350        0.816667  0.1
          350        0.816667  0.1
          350        0.816667  0.1
          350        0.816667  0.1
        InitialWater Initial water: FractionFull=1; PercentMethod=FilledFromTop
        SoilWater: SummerCona=4.4; SummerU=9; SummerDate=1-oct; WinterCona=4.4; WinterU=9; WinterDate=1-apr; DiffusConst=88; DiffusSlope=35; Salb=0.13; CN2Bare=73; CNRed=20; CNCov=0.8; MaxPond=30
          Thickness  SWCON  KLAT
          100        0.3    0
          500        0.3    0
          1400       0.45   0
      outputfile outSimple: filename=SWIM3_soil1 ConvTill outSimple.out; title=SWIM3_soil1 ConvTill outSimple
        variables
          variables: dd/mm/yyyy as Date, biomass, yield, HarvIndex as HI, leaf_no_final, surfaceom_c, leachSum, no3() as no3_tot, NfertTot, fertiliser, irrigation, tempAv, rainSum, dayCount, esSum, eoSum, esw, sw() as SoilWater, drainSum, runoffSum
        events Reporting Frequency: event=harvesting
    manager ClimateControl
      # Climate Control Window
      date1 = 1-jan  # Enter window START date (dd-mmm)
      date2 = 31-dec  # Enter window END date (dd-mmm)
      # Climate Change Parameters
      MaxtChange = 0  # Change in maximum temperature (oC)
      MintChange = 0  # Change in minimum temperature (oC)
      RainChange = 1  # Fractional multiplier of daily rainfall (0-1)
      RadnChange = 0  # Relative change in daily radiation (%)
      CO2 = 350  # Atmospheric CO2 Concentration (ppm)
      on prenewmet:
```
!  Adjust daily temperatures, rainfall and radiation up or down according to user-defined amounts
! To apply different levels of climate control to different times of year add multiple copies of this logic into your simulation and change the window.

if (date_within('[date1], [date2]') = 1) then
   maxt = maxt + [MaxtChange]
   mint = mint + [MintChange]
!   rain = rain + rain * [RainChange] / 100 ! Changed to fit the logic of producing sim files now is "fractional" multiplier of rainfall
    rain = rain * [RainChange]
   radn = radn + radn * [RadnChange] / 100
   co2 = [CO2]
 endif
```
      on Init:
```
co2 = [CO2]
tav = tav + ([MaxtChange] + [MintChange]) / 2
```
  simulation SoilWat_soil1
    summaryfile
    area ConvTill
      surfaceom SurfaceOrganicMatter
        PoolName = wheat  # Organic Matter pool name
        type = wheat  # Organic Matter type
        mass = 1000  # Initial surface residue (kg/ha)
        cnr = 80  # C:N ratio of initial residue
        standing_fraction = 0  # Fraction of residue standing
      fertiliser
      maize
      folder Manager folder -> /simulations/SWIM3_soil1/ConvTill/Manager folder
        manager SowingRuleFancy (disabled)
          # Sowing criteria
          date1 = 15-sep  # Enter sowing window START date (dd-mmm)
          date2 = 16-sep  # Enter sowing window END date (dd-mmm)
          must_sow = yes  # Must sow?
          raincrit = 0  # Amount of rainfall
          rainnumdays = 0  # Number of days of rainfall
          esw_amount = 0  # Enter minimum allowable available soil water (mm)
          # Sowing parameters
          crop = maize  # Enter name of crop to sow
          density = 10  # Enter sowing density (plants/m2)
          depth = 50  # Enter sowing depth (mm)
          cultivar = Pioneer_3902  # Enter cultivar
          class = plant  # Enter crop growth class
          row_spacing = 750  # Enter row spacing (mm)
          SWFTopMinF = 0.6  # Enter MIN water content top layer (0-1 * PAW)
          SWFTopMaxF = 1.05  # Enter MAX water content top layer (0-1 * DUL)
          SowTempLim = 13  # Enter average temperature last 15 days for sow (oC)
          on start_of_day:
```
!-------- Soil water deficit used to trigger sowing rules (fraction of water in soil)
SWD_top = (sw(1) - ll15(1))/(dul(1) - ll15(1)) ! Fraction of plant available water in top layer (fractional)

!-------------------Running average temperature
TempAv = (maxt + mint) * 0.5
TempAvRun = (TempAvRun  * (TempAvPer  - 1) + TempAv ) / TempAvPer

!!! SOWING Temp and mositure rules
SowByMoisture = 0
SowByTemp = 0

         if (SWD_top<= SWFTopMax and SWD_top>= SWFTopMin) then
            SowByMoisture = 1
         endif
         if (TempAvRun > TempAvCritSow) then ! FIXME this threshold needs to be defined in the crop element
            SowByTemp = 1
         endif
         
        ReadyToSow = SowByMoisture * SowByTemp 


! Sowing logic
      if (paddock_is_fallow() = 1 and FallowIn <> 'yes' and (NextCrop = 0 or NextCrop = '[crop]')) then
         if (date_within('[date1], [date2]') = 1) then
            if (rain[[rainnumdays]] >= [raincrit] AND esw >= [esw_amount]) OR
                ('[must_sow]' = 'yes' AND today = date('[date2]'))) THEN
               ChooseNextCrop = 'yes'   ! for rotations
               [crop] sow plants =[density], sowing_depth = [depth], cultivar = [cultivar], row_spacing = [row_spacing], crop_class = [class]

! re-set triggers
SowByMoisture = 0
SowByTemp = 0
ReadyToSow = 0

            endif
            if today = date('[date2]') then
               ChooseNextCrop = 'yes'
            endif
         endif
      endif
```
          on init:
```
nextcrop = 0
fallowin = 0

! ---- sowing related variables

! parameters
TempAvCritSow = '[SowTempLim]' 
SWFTopMax = [SWFTopMaxF]   ! Measure of "too" wet to sow in top most soil layer
SWFTopMin = [SWFTopMinF]   ! Measure of "too" dry to sow in top most soil layer
TempAvPer = 15 ! number of days to calculate running temperature (FIXME: hardcoded now)   

! variables
TempAvRun  = 0
SowByMoisture = 0
SowByTemp = 0
ReadyToSow = 0
```
      manager ExtraVariables -> /simulations/SWIM3_soil1/ConvTill/ExtraVariables
      outputfile -> /simulations/SWIM3_soil1/ConvTill/outputfile: filename=SoilWat_soil1 ConvTill.out; title=SoilWat_soil1 ConvTill
        variables -> /simulations/SWIM3_soil1/ConvTill/outputfile/Variables
        events Reporting Frequency -> /simulations/SWIM3_soil1/ConvTill/outputfile/Reporting Frequency
      outputfile dailyTest -> /simulations/SWIM3_soil1/ConvTill/dailyTest: filename=SoilWat_soil1 ConvTill dailyTest.out; title=SoilWat_soil1 ConvTill dailyTest
        variables -> /simulations/SWIM3_soil1/ConvTill/dailyTest/Variables
        events Reporting Frequency -> /simulations/SWIM3_soil1/ConvTill/dailyTest/Reporting Frequency
      outputfile outSimple -> /simulations/SWIM3_soil1/ConvTill/outSimple: filename=SoilWat_soil1 ConvTill outSimple.out; title=SoilWat_soil1 ConvTill outSimple
        variables -> /simulations/SWIM3_soil1/ConvTill/outSimple/Variables
        events Reporting Frequency -> /simulations/SWIM3_soil1/ConvTill/outSimple/Reporting Frequency
    metfile met -> /simulations/SWIM3_soil1/met
    clock -> /simulations/SWIM3_soil1/clock
    manager ClimateControl -> /simulations/SWIM3_soil1/ClimateControl
    Soil Hastings_29a1 -> /simulations/SWIM3_soil1/ConvTill/Hastings_29a1
  simulation SWIM3_soil2
    metfile met
      filename=C:\GitHubRepos\2016_SAE_Tillage_ClimateChange\weather\HawkesBay_VCSN_agent_28460_rean1970.met
    clock
      start_date = 01/09/1982  # Enter the start date of the simulation
      end_date = 31/12/1985  # Enter the end date of the simulation
    summaryfile
    area ConvTill
      surfaceom SurfaceOrganicMatter
        PoolName = wheat  # Organic Matter pool name
        type = wheat  # Organic Matter type
        mass = 1000  # Initial surface residue (kg/ha)
        cnr = 80  # C:N ratio of initial residue
        standing_fraction = 0  # Fraction of residue standing
      fertiliser
      folder Manager folder: same as SWIM3_soil1.ConvTill.Manager folder
      outputfile: filename=SWIM3_soil2 ConvTill.out; title=SWIM3_soil2 ConvTill
        variables: same as SWIM3_soil1.ConvTill.outputfile.Variables
        events Reporting Frequency: event=harvesting
      maize
      manager ExtraVariables: same as SWIM3_soil1.ConvTill.ExtraVariables
      outputfile dailyTest: filename=SWIM3_soil2 ConvTill dailyTest.out; title=SWIM3_soil2 ConvTill dailyTest
        variables: same as SWIM3_soil1.ConvTill.dailyTest.Variables
        events Reporting Frequency: event=daily
      Soil Oaklea_9a1: SoilType=m; Latitude=-41; Longitude=174; YearOfSampling=0
        DataSource=Profile descriptions provided by Smap based on the work done by Trevor Webb.
        LayerStructure: Thickness=[150.0, 325.0, 305.0, 305.0, 305.0, 305.0, 305.0]
        Water
          Thickness  BD       AirDry     LL15    DUL       SAT        KS
          150.0      1.378    0.07585    0.1517  0.328375  0.41292    1440.0
          325.0      1.55025  0.0980769  0.1275  0.2445    0.2894625  960.0
          305.0      1.5529   0.042      0.042   0.08075   0.096255   960.0
          305.0      1.5529   0.042      0.042   0.08075   0.096255   960.0
          305.0      1.5529   0.042      0.042   0.08075   0.096255   960.0
          305.0      1.5529   0.042      0.042   0.08075   0.096255   960.0
          305.0      1.5529   0.042      0.042   0.08075   0.096255   960.0
          SoilCrop Ryegrass_Clover
            LL=[0.1517, 0.1275, 0.042, 0.042, 0.042, 0.042, 0.042]
            KL=[0.15, 0.139162, 0.0210234, 0.0, 0.0, 0.0, 0.0]
            XF=[1.0, 1.0, 0.825307, 0.825307, 0.825307, 0.825307, 0.825307]
          SoilCrop maize
            Thickness  LL     KL         XF
            100.0      0.165  0.15       1.0
            500.0      0.171  0.111123   1.0
            350.0      0.049  0.0101228  1.0
            350.0      0.049  0.0        1.0
            350.0      0.049  0.0        1.0
            350.0      0.049  0.0        1.0
          SoilCrop wheat: LL=[0.165, 0.171, 0.049, 0.049, 0.049, 0.049]; KL=[0.15, 0.111123, 0.0101228, 0.0, 0.0, 0.0]; XF=[1.0, 1.0, 1.0, 1.0, 1.0, 1.0]
        SoilOrganicMatter: RootCN=40; RootWt=1000; SoilCN=11; EnrACoeff=7.4; EnrBCoeff=0.2
          Thickness  OC        FBiom      FInert
          150.0      2.6       0.0355051  0.321261
          325.0      0.854076  0.0161342  0.667135
          305.0      0.252627  0.0109267  0.870622
          305.0      0.204587  0.0101487  0.948182
          305.0      0.2004    0.0100238  0.979246
          305.0      0.200035  0.0100038  0.991688
          305.0      0.200003  0.0100006  0.996671
        Analysis
          Thickness  Rocks  PH   CEC      ParticleSizeSand  ParticleSizeSilt  ParticleSizeClay
          150.0      7.5    7.0  16.213   11.0              67.0              22.0
          325.0      25.0   7.0  12.2847  11.0              67.0              22.0
          1525.0     75.0   7.0  10.7134  12.5              65.5              22.0
        Sample Initial nitrogen: NO3Units=kgha; NH4Units=kgha; SWUnits=Volumetric; OCUnits=Total; PHUnits=Water
          Thickness  NO3       NH4
          150.0      19.95     0.1
          325.0      43.225    0.1
          305.0      3.97833   0.1
          305.0      0.711667  0.1
          305.0      0.711667  0.1
          305.0      0.711667  0.1
          305.0      0.711667  0.1
        InitialWater Initial water: FractionFull=1; PercentMethod=FilledFromTop
        SoilWater: SummerCona=4.4; SummerU=9; SummerDate=1-oct; WinterCona=4.4; WinterU=9; WinterDate=1-apr; DiffusConst=88; DiffusSlope=35; Salb=0.13; CN2Bare=73; CNRed=20; CNCov=0.8; MaxPond=30
          Thickness  SWCON  KLAT
          150.0      0.3    0.0
          325.0      0.35   0.0
          1525.0     0.3    0.0
      outputfile outSimple: filename=SWIM3_soil2 ConvTill outSimple.out; title=SWIM3_soil2 ConvTill outSimple
        variables
          variables: dd/mm/yyyy as Date, biomass, yield, HarvIndex as HI, leaf_no_final, surfaceom_c, leachSum, no3() as no3_tot, NfertTot, fertiliser, irrigation, tempAv, rainSum, dayCount, esSum, eoSum, esw, sw() as SoilWater, drainSum, runoffSum
        events Reporting Frequency: event=harvesting
    manager ClimateControl: same as SWIM3_soil1.ClimateControl
  simulation SoilWat_soil2
    summaryfile
    area ConvTill
      surfaceom SurfaceOrganicMatter
        PoolName = wheat  # Organic Matter pool name
        type = wheat  # Organic Matter type
        mass = 1000  # Initial surface residue (kg/ha)
        cnr = 80  # C:N ratio of initial residue
        standing_fraction = 0  # Fraction of residue standing
      fertiliser
      maize
      folder Manager folder -> /simulations/SWIM3_soil1/ConvTill/Manager folder
        manager SowingRuleFancy (disabled): same as SoilWat_soil1.ConvTill.Manager folder.SowingRuleFancy
      manager ExtraVariables -> /simulations/SWIM3_soil1/ConvTill/ExtraVariables
      outputfile -> /simulations/SWIM3_soil1/ConvTill/outputfile: filename=SoilWat_soil2 ConvTill.out; title=SoilWat_soil2 ConvTill
        variables -> /simulations/SWIM3_soil1/ConvTill/outputfile/Variables
        events Reporting Frequency -> /simulations/SWIM3_soil1/ConvTill/outputfile/Reporting Frequency
      outputfile dailyTest -> /simulations/SWIM3_soil1/ConvTill/dailyTest: filename=SoilWat_soil2 ConvTill dailyTest.out; title=SoilWat_soil2 ConvTill dailyTest
        variables -> /simulations/SWIM3_soil1/ConvTill/dailyTest/Variables
        events Reporting Frequency -> /simulations/SWIM3_soil1/ConvTill/dailyTest/Reporting Frequency
      outputfile outSimple -> /simulations/SWIM3_soil1/ConvTill/outSimple: filename=SoilWat_soil2 ConvTill outSimple.out; title=SoilWat_soil2 ConvTill outSimple
        variables -> /simulations/SWIM3_soil1/ConvTill/outSimple/Variables
        events Reporting Frequency -> /simulations/SWIM3_soil1/ConvTill/outSimple/Reporting Frequency
    metfile met -> /simulations/SWIM3_soil1/met
    clock -> /simulations/SWIM3_soil1/clock
    manager ClimateControl -> /simulations/SWIM3_soil1/ClimateControl
    Soil Oaklea_9a1: SoilType=m; Latitude=-41; Longitude=174; YearOfSampling=0
      DataSource=Profile descriptions provided by Smap based on the work done by Trevor Webb.
      LayerStructure: Thickness=[150.0, 325.0, 305.0, 305.0, 305.0, 305.0, 305.0]
      Water
        Thickness  BD       AirDry     LL15    DUL       SAT        KS
        150        1.378    0.07585    0.1517  0.328375  0.41292    1440
        325        1.55025  0.0980769  0.1275  0.2445    0.2894625  960
        305        1.5529   0.042      0.042   0.08075   0.096255   960
        305        1.5529   0.042      0.042   0.08075   0.096255   960
        305        1.5529   0.042      0.042   0.08075   0.096255   960
        305        1.5529   0.042      0.042   0.08075   0.096255   960
        305        1.5529   0.042      0.042   0.08075   0.096255   960
        SoilCrop Ryegrass_Clover: LL=[0.1517, 0.1275, 0.042, 0.042, 0.042, 0.042, 0.042]; KL=[0.15, 0.139162, 0.0210234, 0, 0, 0, 0]; XF=[1, 1, 0.825307, 0.825307, 0.825307, 0.825307, 0.825307]
        SoilCrop maize: LL=[0.165, 0.171, 0.049, 0.049, 0.049, 0.049, -]; KL=[0.15, 0.111123, 0.0101228, 0, 0, 0, -]; XF=[1, 1, 1, 1, 1, 1, -]
        SoilCrop wheat: LL=[0.165, 0.171, 0.049, 0.049, 0.049, 0.049, -]; KL=[0.15, 0.111123, 0.0101228, 0, 0, 0, -]; XF=[1, 1, 1, 1, 1, 1, -]
      SoilOrganicMatter: same as SWIM3_soil2.ConvTill.Oaklea_9a1.SoilOrganicMatter
      Analysis
        Thickness  Rocks  PH   CEC      ParticleSizeSand  ParticleSizeSilt  ParticleSizeClay
        150.0      7.5    7.0  16.213   11.0              67.0              22.0
        325.0      25.0   7.0  12.2847  11.0              67.0              22.0
        1525.0     75.0   7.0  10.7134  12.5              65.5              22.0
      Sample Initial nitrogen: same as SWIM3_soil2.ConvTill.Oaklea_9a1.Initial nitrogen
      InitialWater Initial water: FractionFull=1; PercentMethod=FilledFromTop
      SoilWater: same as SWIM3_soil2.ConvTill.Oaklea_9a1.SoilWater
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