folder simulations: version=37; creator=Apsim 7.9-r4044
  memo
    Issues to resolve
    - Using american hybrid to test - change to NZ hybrid later
    - Why is leaching so different between models?
    - Not sensitive to Ks in SWIM - check
  simulation SWIM3
    metfile met
      filename=C:\GitHubRepos\2016_SAE_Tillage_ClimateChange\weather\HawkesBay_VCSN_agent_28460_rean1970.met
    clock
      start_date = 01/09/1982  # Enter the start date of the simulation
      end_date = 31/12/2000  # Enter the end date of the simulation
    summaryfile
    area ConvTill
      surfaceom SurfaceOrganicMatter
        PoolName = wheat  # Organic Matter pool name
        type = wheat  # Organic Matter type
        mass = 1000  # Initial surface residue (kg/ha)
        cnr = 80  # C:N ratio of initial residue
        standing_fraction = 0  # Fraction of residue standing
      fertiliser
      folder Manager folder
        operations SimpleSowRule
          10-oct  maize sow plants =10, sowing_depth = 50,  cultivar = Pioneer_35P12_104' ,  row_spacing = 750,  crop_class = plant
        manager Harvesting rule
          # Harvesting criteria
          crop = maize  # Enter name of crop to harvest when ripe
          on end_of_day:
```
           if [crop].StageName = 'harvest_ripe' or [crop].plant_status = 'dead' then
              [crop]  harvest
              [crop]  end_crop
           endif
```
        operations FertiliserSimpleRules
          10-oct  fertiliser apply amount= 40 (kg/ha), type= urea_N (), depth= 10 (mm)
          10-dec  fertiliser apply amount= 150 (kg/ha), type= urea_N (), depth= 10 (mm)
        manager Tillage
          # When should tillage be performed
          modulename = maize  # The module the event come from
          eventname = sowing  # On which event should tillage be done
          # Tillage details
          surfaceommodule = SurfaceOrganicMatter  # Module used to apply the tillage
          tillage_type = disc
          tillage_depth = 20  # User_defined depth of seedbed preparation (mm)
          tillage_f_incorp = 0.5  # User_defined fraction of surface residues to incorporate (0-1)
          on sowing:
```
 '[surfaceommodule]' tillage type = [tillage_type], f_incorp = [tillage_f_incorp] (), tillage_depth = [tillage_depth]
```
        irrigation (disabled)
          automatic_irrigation = off
          asw_depth = 600  # Depth to which ASW is calculated. (mm)
          crit_fr_asw = 0.7  # Fraction of ASW below which irrigation is applied (0-1.0)
          irrigation_efficiency = 1  # Efficiency of the irrigation. (0-1.0)
          irrigation_allocation = off  # Allocation limits
          allocation = 0  # Allocation in mm
          default_no3_conc = 0.0  # Nitrate concentration (ppm N)
          default_nh4_conc = 0.0  # Ammonium concentration (ppm N)
          default_cl_conc = 0.0  # Chloride concentration (ppm Cl)
      outputfile: filename=SWIM3 ConvTill.out; title=SWIM3 ConvTill
        variables
          variables: dd/mm/yyyy as Date, biomass, yield, grain_protein, grain_size, esw, sw, surfaceom_c, leachSum, no3(), drainSum, HarvIndex as HI, NfertTot, fertiliser, ReadyToSow, n_stress_expan, n_stress_grain, n_stress_pheno, n_stress_photo, n_stress_tiller, sw_stress_expan, sw_stress_pheno, sw_stress_photo, sw_stress_tiller, leaf_no_final
        events Reporting Frequency: event=harvesting
      maize
      manager ExtraVariables
        on init:
```
leachSum = 0 kg N-no3/fa
drainSum = 0 mm
HarvIndex = 0
tempSum = 0
tempAv = 0
rainSum = 0
dayCount = 0
eoSum=0 ! pot ET
esSum=0 ! soil evap
runoffSum = 0
```
        on start_of_day:
```
dayCount = dayCount + 1
leachSum = leachSum + flow_no3(4)
drainSum = drainSum + drain
tempSum = (tempSum + (mint + maxt)*0.5)
tempAv = tempSum/dayCount
rainSum = rain + rainSum 
eoSum= eo + eoSum 
esSum= es + esSum
runoffSum = runoffSum + runoff

if (biomass>0) then
HarvIndex = yield/biomass
else
HarvIndex = 0 
endif
```
        on sowing:
```
leachSum = 0
drainSum = 0
HarvIndex = 0
dayCount = 0
tempAv = 0
rainSum = 0
tempSum = 0
eoSum= 0 
esSum= 0
runoffSum = 0
```
      outputfile dailyTest: filename=SWIM3 ConvTill dailyTest.out; title=SWIM3 ConvTill dailyTest
        variables
          variables: dd/mm/yyyy as Date, ReadyToSow, SowByMoisture, SowByTemp, SWD_top, TempAvRun, n_stress_expan, n_stress_grain, n_stress_pheno, n_stress_photo, n_stress_tiller, sw_stress_expan, sw_stress_pheno, sw_stress_photo, sw_stress_tiller, fertiliser, irrigation, rain, es as evaporation, drain, sw_dep(), dnit() as denitrification, surfaceom_n, fom_n(), biom_n(), hum_n(), urea(), nh4(), no3(), sat_dep(), dul_dep(), ll15_dep()
        events Reporting Frequency: event=daily
      Soil Templeton_Wakanui deep: SoilType=NZ_sedementary; Region=Plains; State=Canterbury; Country=New Zealand; Latitude=0; Longitude=0; YearOfSampling=0
        DataSource=Generic profile descriptions provided by Trevor Webb and data for functional horizions based on SWAMP project results
        Comments=Bulk density values were measured on the fine earth fraction so values entered into apsim soil are adjusted down to account for stone content (assuming stones are inert from all soil process so their mass and volume is removed from model paramaters).  SAT, DUL, LL15 and Air dry have been adjusted down to account for stone content.  OC has not been adjusted so the model will get the correct carbon and N amounts using the adjusted BD.
        Analysis: PHUnits=Water; BoronUnits=HotWater
          Thickness  Rocks  PH  CEC  ParticleSizeSand  ParticleSizeSilt  ParticleSizeClay
          280        0      6   13   14.5              65.5              20
          350        0      6   9    18                58                24
          300        0      6   9    14                63                23
          270        0      6   9    15                66                19
          300        0      6   9    15                66                19
          Rocks, PH, CEC, ParticleSizeSand, ParticleSizeSilt, ParticleSizeClay source: Estimated based on local knowledge
        Water
          Thickness  BD      AirDry  LL15    DUL     SAT       KS
          100        1.3105  0.06    0.1535  0.3735  0.456165  4832.04
          100        1.311   0.14    0.154   0.374   0.456     4832.039
          100        1.524   0.201   0.201   0.332   0.394     389.229
          300        1.524   0.201   0.201   0.332   0.394     389.229
          300        1.65    0.201   0.201   0.338   0.359     16.362
          300        1.601   0.162   0.162   0.325   0.376     97.995
          300        1.601   0.162   0.162   0.325   0.376     97.995
          BD, AirDry, LL15, DUL, SAT source: Estimated based on local knowledge (layer 1, 2, 3, 4, 5)
          SoilCrop Maize: LL=[0.1535, 0.154, 0.201, 0.201, 0.162, 0.162, 0.162]; KL=[0.244118, 0.24, 0.33, 0.1, 0.06, 0.03, 0.03]; XF=[1, 1, 0.8, 0.1, 0.5, 0.5, 0.5]
            LL source: Estimated based on local knowledge (layer 1, 2, 3, 4, 5)
        Swim: Salb=0.13; CN2Bare=75; CNRed=20; CNCov=0.8; KDul=0.1; PSIDul=-100; VC=true; DTmin=0; DTmax=1440; MaxWaterIncrement=10; SpaceWeightingFactor=0; SoluteSpaceWeightingFactor=0; Diagnostics=false
          SwimSoluteParameters: Dis=15; Disp=1; A=1; DTHP=1
            zero: DTHC, WaterTableCl, WaterTableNO3, WaterTableNH4, WaterTableUrea, WaterTableTracer, WaterTableMineralisationInhibitor, WaterTableUreaseInhibitor, WaterTableNitrificationInhibitor, WaterTableDenitrificationInhibitor
            Thickness  NO3Exco  NO3FIP  NH4Exco  NH4FIP  UreaExco  UreaFIP  ClExco  ClFIP
            1000       0        1       100      1       0         1        0       1
            1000       0        1       100      1       0         1        0       1
            1000       0        1       100      1       0         1        0       1
        SoilOrganicMatter: RootCN=40; RootWt=1000; SoilCN=11; EnrACoeff=7.4; EnrBCoeff=0.2; OCUnits=Total
          Thickness  OC     FBiom      FInert
          100        3      0.0272684  0.515525
          100        1.5    0.02       0.65
          100        0.411  0.013      0.812
          300        0.216  0.01       0.929
          300        0.202  0.01       0.97
          300        0.2    0.01       0.987
          300        0.2    0.01       0.987
          OC source: Estimated based on local knowledge (layer 1, 2, 3, 4, 5)
        LayerStructure: Thickness=[10, 20, 30, 40, 100, 200, 200, 200, 200, 200, 200, 100]
        InitialWater: FractionFull=1; PercentMethod=FilledFromTop
        Sample InitialNitrogen: NO3Units=kgha; NH4Units=kgha; SWUnits=Volumetric; OCUnits=Total; PHUnits=Water
          Thickness  NO3  NH4
          300        80   1
          300        20   1
          900        1    0
      outputfile outSimple: filename=SWIM3 ConvTill outSimple.out; title=SWIM3 ConvTill outSimple
        variables
          variables: dd/mm/yyyy as Date, biomass, yield, HarvIndex as HI, leaf_no_final, surfaceom_c, leachSum, no3() as no3_tot, NfertTot, fertiliser, irrigation, tempAv, rainSum, dayCount, esSum, eoSum, esw, sw() as SoilWater, drainSum, runoffSum
        events Reporting Frequency: event=harvesting
    manager ClimateControl
      # Climate Control Window
      date1 = 1-jan  # Enter window START date (dd-mmm)
      date2 = 31-dec  # Enter window END date (dd-mmm)
      # Climate Change Parameters
      MaxtChange = 0  # Change in maximum temperature (oC)
      MintChange = 0  # Change in minimum temperature (oC)
      RainChange = 1  # Fractional multiplier of daily rainfall (0-1)
      RadnChange = 0  # Relative change in daily radiation (%)
      CO2 = 350  # Atmospheric CO2 Concentration (ppm)
      on prenewmet:
```
!  Adjust daily temperatures, rainfall and radiation up or down according to user-defined amounts
! To apply different levels of climate control to different times of year add multiple copies of this logic into your simulation and change the window.

if (date_within('[date1], [date2]') = 1) then
   maxt = maxt + [MaxtChange]
   mint = mint + [MintChange]
!   rain = rain + rain * [RainChange] / 100 ! Changed to fit the logic of producing sim files now is "fractional" multiplier of rainfall
    rain = rain * [RainChange]
   radn = radn + radn * [RadnChange] / 100
   co2 = [CO2]
 endif
```
      on Init:
```
co2 = [CO2]
tav = tav + ([MaxtChange] + [MintChange]) / 2
```
  simulation SoilWat
    summaryfile
    area ConvTill
      Soil Templeton_Wakanui deep -> /simulations/SWIM3/ConvTill/Templeton_Wakanui deep 
        SoilWater: SummerCona=4.4; SummerU=9; SummerDate=1-Oct; WinterCona=3; WinterU=6; WinterDate=1-Apr; DiffusConst=88; DiffusSlope=35; Salb=0.13; CN2Bare=73; CNRed=20; CNCov=0.8; Thickness=[150, 130, 350, 300, 270, 300]; SWCON=[0.496442, 0.496, 0.366, 0.2, 0.306, 0.306]
      surfaceom SurfaceOrganicMatter
        PoolName = wheat  # Organic Matter pool name
        type = wheat  # Organic Matter type
        mass = 1000  # Initial surface residue (kg/ha)
        cnr = 80  # C:N ratio of initial residue
        standing_fraction = 0  # Fraction of residue standing
      fertiliser
      maize
      folder Manager folder -> /simulations/SWIM3/ConvTill/Manager folder
        manager SowingRuleFancy (disabled)
          # Sowing criteria
          date1 = 15-sep  # Enter sowing window START date (dd-mmm)
          date2 = 16-sep  # Enter sowing window END date (dd-mmm)
          must_sow = yes  # Must sow?
          raincrit = 0  # Amount of rainfall
          rainnumdays = 0  # Number of days of rainfall
          esw_amount = 0  # Enter minimum allowable available soil water (mm)
          # Sowing parameters
          crop = maize  # Enter name of crop to sow
          density = 10  # Enter sowing density (plants/m2)
          depth = 50  # Enter sowing depth (mm)
          cultivar = Pioneer_3902  # Enter cultivar
          class = plant  # Enter crop growth class
          row_spacing = 750  # Enter row spacing (mm)
          SWFTopMinF = 0.6  # Enter MIN water content top layer (0-1 * PAW)
          SWFTopMaxF = 1.05  # Enter MAX water content top layer (0-1 * DUL)
          SowTempLim = 13  # Enter average temperature last 15 days for sow (oC)
          on start_of_day:
```
!-------- Soil water deficit used to trigger sowing rules (fraction of water in soil)
SWD_top = (sw(1) - ll15(1))/(dul(1) - ll15(1)) ! Fraction of plant available water in top layer (fractional)

!-------------------Running average temperature
TempAv = (maxt + mint) * 0.5
TempAvRun = (TempAvRun  * (TempAvPer  - 1) + TempAv ) / TempAvPer

!!! SOWING Temp and mositure rules
SowByMoisture = 0
SowByTemp = 0

         if (SWD_top<= SWFTopMax and SWD_top>= SWFTopMin) then
            SowByMoisture = 1
         endif
         if (TempAvRun > TempAvCritSow) then ! FIXME this threshold needs to be defined in the crop element
            SowByTemp = 1
         endif
         
        ReadyToSow = SowByMoisture * SowByTemp 


! Sowing logic
      if (paddock_is_fallow() = 1 and FallowIn <> 'yes' and (NextCrop = 0 or NextCrop = '[crop]')) then
         if (date_within('[date1], [date2]') = 1) then
            if (rain[[rainnumdays]] >= [raincrit] AND esw >= [esw_amount]) OR
                ('[must_sow]' = 'yes' AND today = date('[date2]'))) THEN
               ChooseNextCrop = 'yes'   ! for rotations
               [crop] sow plants =[density], sowing_depth = [depth], cultivar = [cultivar], row_spacing = [row_spacing], crop_class = [class]

! re-set triggers
SowByMoisture = 0
SowByTemp = 0
ReadyToSow = 0

            endif
            if today = date('[date2]') then
               ChooseNextCrop = 'yes'
            endif
         endif
      endif
```
          on init:
```
nextcrop = 0
fallowin = 0

! ---- sowing related variables

! parameters
TempAvCritSow = '[SowTempLim]' 
SWFTopMax = [SWFTopMaxF]   ! Measure of "too" wet to sow in top most soil layer
SWFTopMin = [SWFTopMinF]   ! Measure of "too" dry to sow in top most soil layer
TempAvPer = 15 ! number of days to calculate running temperature (FIXME: hardcoded now)   

! variables
TempAvRun  = 0
SowByMoisture = 0
SowByTemp = 0
ReadyToSow = 0
```
      manager ExtraVariables -> /simulations/SWIM3/ConvTill/ExtraVariables
      outputfile -> /simulations/SWIM3/ConvTill/outputfile: filename=SoilWat ConvTill.out; title=SoilWat ConvTill
        variables -> /simulations/SWIM3/ConvTill/outputfile/Variables
        events Reporting Frequency -> /simulations/SWIM3/ConvTill/outputfile/Reporting Frequency
      outputfile dailyTest -> /simulations/SWIM3/ConvTill/dailyTest: filename=SoilWat ConvTill dailyTest.out; title=SoilWat ConvTill dailyTest
        variables -> /simulations/SWIM3/ConvTill/dailyTest/Variables
        events Reporting Frequency -> /simulations/SWIM3/ConvTill/dailyTest/Reporting Frequency
      outputfile outSimple -> /simulations/SWIM3/ConvTill/outSimple: filename=SoilWat ConvTill outSimple.out; title=SoilWat ConvTill outSimple
        variables -> /simulations/SWIM3/ConvTill/outSimple/Variables
        events Reporting Frequency -> /simulations/SWIM3/ConvTill/outSimple/Reporting Frequency
    metfile met -> /simulations/SWIM3/met
    clock -> /simulations/SWIM3/clock
    manager ClimateControl -> /simulations/SWIM3/ClimateControl
  simulation SWIM3_base
    metfile met
      filename=C:\GitHubRepos\2016_SAE_Tillage_ClimateChange\weather\HawkesBay_VCSN_agent_28460_rean1970.met
    clock
      start_date = 01/09/1982  # Enter the start date of the simulation
      end_date = 31/12/2000  # Enter the end date of the simulation
    summaryfile
    area ConvTill
      surfaceom SurfaceOrganicMatter
        PoolName = wheat  # Organic Matter pool name
        type = wheat  # Organic Matter type
        mass = 1000  # Initial surface residue (kg/ha)
        cnr = 80  # C:N ratio of initial residue
        standing_fraction = 0  # Fraction of residue standing
      fertiliser
      folder Manager folder
        operations SimpleSowRule
          10-oct  maize sow plants =10, sowing_depth = 50,  cultivar = 'Pioneer_35P12_104' ,  row_spacing = 750,  crop_class = plant
        manager Harvesting rule
          # Harvesting criteria
          crop = maize  # Enter name of crop to harvest when ripe
          on end_of_day:
          script: same as in SWIM3.ConvTill.Manager folder.Harvesting rule
        operations FertiliserSimpleRules: same as SWIM3.ConvTill.Manager folder.FertiliserSimpleRules
        manager Tillage: same as SWIM3.ConvTill.Manager folder.Tillage
      maize
      manager ExtraVariables: same as SWIM3.ConvTill.ExtraVariables
      Soil Templeton_Wakanui deep: same as SWIM3.ConvTill.Templeton_Wakanui deep
      outputfile outSimple: filename=SWIM3_base ConvTill outSimple.out; title=SWIM3_base ConvTill outSimple
        variables
          variables: dd/mm/yyyy as Date, biomass, yield, HarvIndex as HI, leaf_no_final, surfaceom_c, leachSum, no3() as no3_tot, NfertTot, fertiliser, irrigation, tempAv, rainSum, dayCount, esSum, eoSum, esw, sw() as SoilWater, drainSum, runoffSum
        events Reporting Frequency: event=harvesting
    manager ClimateControl: same as SWIM3.ClimateControl
  simulation SoilWat_base
    summaryfile
    area ConvTill
      Soil Templeton_Wakanui deep: SoilType=NZ_sedementary; Region=Plains; State=Canterbury; Country=New Zealand; Latitude=0; Longitude=0; YearOfSampling=0
        DataSource=Generic profile descriptions provided by Trevor Webb and data for functional horizions based on SWAMP project results
        Comments=Bulk density values were measured on the fine earth fraction so values entered into apsim soil are adjusted down to account for stone content (assuming stones are inert from all soil process so their mass and volume is removed from model paramaters).  SAT, DUL, LL15 and Air dry have been adjusted down to account for stone content.  OC has not been adjusted so the model will get the correct carbon and N amounts using the adjusted BD.
        Analysis: same as SWIM3.ConvTill.Templeton_Wakanui deep.Analysis
        Water: same as SWIM3.ConvTill.Templeton_Wakanui deep.Water
        SoilWater: same as SoilWat.ConvTill.Templeton_Wakanui deep.SoilWater
        SoilOrganicMatter: same as SWIM3.ConvTill.Templeton_Wakanui deep.SoilOrganicMatter
        InitialWater: FractionFull=1; PercentMethod=FilledFromTop
        Sample InitialNitrogen: NO3Units=kgha; NH4Units=kgha; SWUnits=Volumetric; OCUnits=Total; PHUnits=Water
          Thickness  NO3  NH4
          300        80   1
          300        20   1
          900        1    0
      surfaceom SurfaceOrganicMatter
        PoolName = wheat  # Organic Matter pool name
        type = wheat  # Organic Matter type
        mass = 1000  # Initial surface residue (kg/ha)
        cnr = 80  # C:N ratio of initial residue
        standing_fraction = 0  # Fraction of residue standing
      fertiliser
      maize
      folder Manager folder
        operations SimpleSowRule
          10-oct  maize sow plants =10, sowing_depth = 50,  cultivar = 'Pioneer_35P12_104 ' ,  row_spacing = 750,  crop_class = plant
        manager Harvesting rule
          # Harvesting criteria
          crop = maize  # Enter name of crop to harvest when ripe
          on end_of_day:
          script: same as in SWIM3.ConvTill.Manager folder.Harvesting rule
        operations FertiliserSimpleRules: same as SWIM3.ConvTill.Manager folder.FertiliserSimpleRules
        manager Tillage: same as SWIM3.ConvTill.Manager folder.Tillage
      manager ExtraVariables: same as SWIM3.ConvTill.ExtraVariables
      outputfile outSimple: filename=SoilWat_base ConvTill outSimple.out; title=SoilWat_base ConvTill outSimple
        variables
          variables: dd/mm/yyyy as Date, biomass, yield, HarvIndex as HI, leaf_no_final, surfaceom_c, leachSum, no3() as no3_tot, NfertTot, fertiliser, irrigation, tempAv, rainSum, dayCount, esSum, eoSum, esw, sw() as SoilWater, drainSum, runoffSum
        events Reporting Frequency: event=harvesting
    metfile met
      filename=C:\GitHubRepos\2016_SAE_Tillage_ClimateChange\weather\HawkesBay_VCSN_agent_28460_rean1970.met
    clock
      start_date = 01/09/1982  # Enter the start date of the simulation
      end_date = 31/12/2000  # Enter the end date of the simulation
    manager ClimateControl: same as SWIM3.ClimateControl
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